// COMSOL Multiphysics 5.0.0.243 model "Block Saturated (Remanent M).mph"
// Outline of the model tree

Parameters
  n_helix = 4  // The number of the Helix from 1 till 10
  h_max = 32.97e-6 [m]
  k_helix = 3  // Number of turns
  d_nom = 3e-6[m]  // Nominal wire diameter
  D_nom = 10e-6[m]  // Nominal helix diameter
  h_nom = 10e-6[m]  // Nominal height (pitch)
  d_helix = d_nom  // Wire diameter
  h_min = d_helix
  h_tol = 0.005
  D_tol = 0
  h_helix = (h_min + (n_helix-1)*(h_max-h_min)/9)*(1 + h_tol)
  v_nom = (pi*d_nom^2/4)*k_helix*sqrt(h_nom^2+(pi*D_nom)^2)  // Nominal volume
  D_helix = (1/pi)*sqrt((round((4*v_nom/(k_helix*pi*d_nom^2))*10^8)*10^-8)^2-h_helix^2)+D_tol  // Helix diameter
  r_sphere = 5*h_max*k_helix  // Sphere radius
  steps_x = 10
  steps_y = 10
  steps_z = 10
  mu0 = 1.25663706e-6[m*kg*s^-2*A^-2]  // Magnetic Constant
  M_app = 1[A/m]
  N_x = 1
  N_y = 0
  N_z = 0
  M_x = N_x*M_app
  M_y = N_y*M_app
  M_z = N_z*M_app
  a = D_helix
  b = D_helix
  c = h_helix*k_helix

Variables
  var1 "Variables 1"
    M_x_av = aveop1(mfnc.Mx)
    M_y_av = aveop1(mfnc.My)
    M_z_av = aveop1(mfnc.Mz)

Geometry
  geom1 "Geometry 1" (3D, length unit m)
    sph1: Sphere | r = r_sphere
    hel1: Helix (disabled)
      pos = {0, 0, -h_helix*k_helix/2}
      turns = k_helix
      rmaj = D_helix/2
      rmin = d_helix/2
      axialpitch = h_helix
      endcaps = perpspine
    blk1: Block | pos = {-D_helix/2, -D_helix/2, -h_helix*k_helix/2}; size = {a, b, c}
    elp1: Ellipsoid (disabled) | pos = {0, 0, 0}; semiaxes = {a/2, b/2, c/2}
    fin: Finalize "Form Union"

Materials
  mat2: Common "Air" on domains 1, 2
    def "Basic"
      relpermeability = 1
      relpermittivity = 1
      dynamicviscosity = eta(T[1/K])[Pa*s]
      ratioofspecificheat = 1.4
      electricconductivity = 0[S/m]
      heatcapacity = Cp(T[1/K])[J/(kg*K)]
      density = rho(pA[1/Pa],T[1/K])[kg/m^3]
      thermalconductivity = k(T[1/K])[W/(m*K)]
      soundspeed = cs(T[1/K])[m/s]
      eta: Piecewise | arg = T; extrap = constant; pieces = {200.0, 1600.0, -8.38278E-7+8.35717342E-8*T^1-7.69429583E-11*T^2+4.6437266E-14*T^3-1.06585607E-17*T^4}
      Cp: Piecewise | arg = T; extrap = constant; pieces = {200.0, 1600.0, 1047.63657-0.372589265*T^1+9.45304214E-4*T^2-6.02409443E-7*T^3+1.2858961E-10*T^4}
      rho: Analytic | expr = pA*0.02897/8.314/T; args = {pA, T}; dermethod = manual; argders = {{pA, d(pA*0.02897/8.314/T,pA)}, {T, d(pA*0.02897/8.314/T,T)}}
      k: Piecewise | arg = T; extrap = constant; pieces = {200.0, 1600.0, -0.00227583562+1.15480022E-4*T^1-7.90252856E-8*T^2+4.11702505E-11*T^3-7.43864331E-15*T^4}
      cs: Analytic | expr = sqrt(1.4*287*T); args = T; dermethod = manual; argders = {T, d(sqrt(1.4*287*T),T)}
    RefractiveIndex
      n = 1
      ki = 0
  mat3: Common "Cobalt Steel Vacoflux 50_ScaledforNickel" (disabled) on no domains
    def "Basic"
      electricconductivity = 2.272727[MS/m]
      relpermittivity = 1[1]
      relpermeability = 5
    HBCurve
      normH = HBCurve1(normB[1/(T)])[A/m]
      normB = sqrt(B1^2+B2^2+B3^2)
      HBCurve1: Interpolation
        table = 
          {0, 0}
          {0.072655, 18.285}
          {0.087074, 18.333}
          {0.099587, 18.666}
          {0.10829, 19.571}
          {0.11127, 21.332}
          {0.10793, 24.142}
          {0.1029, 27.808}
          {0.10211, 32.046}
          {0.1115, 36.57}
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        extrap = linear
    BHCurve
      normB = BHCurve1(normH[1/(A/m)])[T]
      normH = sqrt(H1^2+H2^2+H3^2)
      BHCurve1: Interpolation
        table = 
          {0, 0}
          {18.285, 0.072655}
          {18.333, 0.087074}
          {18.666, 0.099587}
          {19.571, 0.10829}
          {21.332, 0.11127}
          {24.142, 0.10793}
          {27.808, 0.1029}
          {32.046, 0.10211}
          {36.57, 0.1115}
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        extrap = linear
  mat4: Common "Cobalt Steel Vacoflux 50_Test" (disabled) on no domains
    def "Basic"
      electricconductivity = 2.272727[MS/m]
      relpermittivity = 1[1]
      relpermeability = 5
    HBCurve
      normH = HBCurve1(normB[1/(T)])[A/m]
      normB = sqrt(B1^2+B2^2+B3^2)
    BHCurve
      normB = BHCurve1(normH[1/(A/m)])[T]
      normH = sqrt(H1^2+H2^2+H3^2)
      BHCurve1: Interpolation
        table = 
          {0, 0}
          {18.285, 0.19173}
          {18.333, 0.22978}
          {18.666, 0.2628}
          {19.571, 0.28576}
          {21.332, 0.29363}
          {24.142, 0.28482}
          {27.808, 0.27154}
          {32.046, 0.26946}
          {36.57, 0.29423}
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        extrap = linear
  mat5: Common "Cobalt Steel Vacoflux 50" on no domains
    def "Basic"
      electricconductivity = 2.272727[MS/m]
      relpermittivity = 1[1]
    HBCurve
      normH = HBCurve1(normB[1/(T)])[A/m]
      normB = sqrt(B1^2+B2^2+B3^2)
      HBCurve1: Interpolation
        table = 
          {0, 0}
          {0.273901809, 18.285}
          {0.328259582417, 18.3326171875}
          {0.375430663333, 18.6659375}
          {0.40822835925, 19.5706640625}
          {0.419465977667, 21.3325}
          {0.406882536674, 24.1419140625}
          {0.387919896729, 27.8084375}
          {0.384945628878, 32.0463671875}
          {0.420327304167, 36.57}
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        extrap = linear
    BHCurve
      normB = BHCurve1(normH[1/(A/m)])[T]
      normH = sqrt(H1^2+H2^2+H3^2)
      BHCurve1: Interpolation
        table = 
          {0, 0}
          {18.285, 0.273901809}
          {18.3326171875, 0.328259582417}
          {18.6659375, 0.375430663333}
          {19.5706640625, 0.40822835925}
          {21.3325, 0.419465977667}
          {24.1419140625, 0.406882536674}
          {27.8084375, 0.387919896729}
          {32.0463671875, 0.384945628878}
          {36.57, 0.420327304167}
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        extrap = linear

Physics
  mfnc: MagnetostaticsNoCurrents "Magnetic Fields, No Currents" on all domains
    dependent variable Vm
    BackgroundField.SolveFor = fullField
    BackgroundField.Hb = {5000[T]/mu0_const, 0, 0}
    mfc1: MagneticFluxConservation (default)
    mi1: MagneticInsulation (default)
    init1: init "Initial Values 1" (default)
    mfc2: MagneticFluxConservation on domains 2 | ConstitutiveRelationH = Magnetization; M = {M_x, M_y, M_z}
    zsp1: ZeroMagneticScalarPotential on no points

Mesh
  mesh1 "Mesh 1"
    size: MeshSizeDefault
      table = default
      hmax = 1.98E-5
      hmin = 1.98E-7
      hcurve = 0.2
      hnarrow = 1
      hauto = 1
      custom = off
    ftet1: FreeTet "Free Tetrahedral 1" on domains 2
      cr1: CornerRefinement on domains 2
    ftet2: FreeTet "Free Tetrahedral 2" on remaining entities
      size1: Size on entire geometry | hauto = 5

Studies
  std1 "Study 1"
    param2: Parametric "Parametric Sweep 2" (disabled)
      sweeptype = sparse
      pname = {n_helix, h_tol}
      plistarr = {1 2 3 4 5 6 7 8 9, 0.005 0 0 0 0 0 0}
    param: Parametric "Parametric Sweep" | pname = {N_x, N_y, N_z}; plistarr = {1 0 0, 0 1 0, 0 0 1}
    stat2: Stationary

Solver configurations
  sol1 "Solver 1" (study std1)
    v1: Variables "Dependent Variables 1"
    s1: Stationary "Stationary Solver 1"
      p1: Parametric
        sweeptype = sparse
        pname = {N_x, N_y, N_z}
        plistarr = {1 0 0, 0 1 0, 0 0 1}
        pcontinuationmode = no
      fc1: FullyCoupled | linsolver = i1
      i1: Iterative | linsolver = cg
        mg1: Multigrid | prefun = amg

Datasets
  dset1: Solution | solution = sol1

Derived values
  av1: AvVolume "Volume Average 1" on domains 2 | data = dset1; table = tbl1; expr = mfnc.Hx
  av2: AvVolume "Volume Average 2" on domains 2 | data = dset1; table = tbl2; expr = mfnc.Hy
  av3: AvVolume "Volume Average 3" on domains 2 | data = dset1; table = tbl3; expr = mfnc.Hz
  av4: AvVolume "Volume Average 4" on domains 2 | data = dset1; table = tbl4; expr = mfnc.normM
  gev1: EvalGlobal "Global Evaluation 1" | data = dset1; table = tbl5; expr = a; unit = m
  gev2: EvalGlobal "Global Evaluation 2" | data = dset1; table = tbl6; expr = b; unit = m
  gev3: EvalGlobal "Global Evaluation 3" | data = dset1; table = tbl7; expr = c; unit = m

Tables
  tbl1: Table
    // Volume Average 1 (mfnc.Hx)
    N_x | N_y | N_z | Magnetic field, x component (A/m)
    1 | 0 | 0 | -0.462975
    0 | 1 | 0 | -2.12722e-07
    0 | 0 | 1 | 8.62744e-08
  tbl2: Table
    // Volume Average 2 (mfnc.Hy)
    N_x | N_y | N_z | Magnetic field, y component (A/m)
    1 | 0 | 0 | -1.78456e-07
    0 | 1 | 0 | -0.462977
    0 | 0 | 1 | -3.97543e-07
  tbl3: Table
    // Volume Average 3 (mfnc.Hz)
    N_x | N_y | N_z | Magnetic field, z component (A/m)
    1 | 0 | 0 | 3.68494e-08
    0 | 1 | 0 | -2.68355e-07
    0 | 0 | 1 | -0.0738519
  tbl4: Table
    // Volume Average 4 (mfnc.normM)
    N_x | N_y | N_z | Magnetization norm (A/m)
    1 | 0 | 0 | 1
    0 | 1 | 0 | 1
    0 | 0 | 1 | 1
  tbl5: Table
    // Global Evaluation 1 (a)
    N_x | N_y | N_z | a
    1 | 0 | 0 | 9.6369e-06
    0 | 1 | 0 | 9.6369e-06
    0 | 0 | 1 | 9.6369e-06
  tbl6: Table
    // Global Evaluation 2 (b)
    N_x | N_y | N_z | b
    1 | 0 | 0 | 9.6369e-06
    0 | 1 | 0 | 9.6369e-06
    0 | 0 | 1 | 9.6369e-06
  tbl7: Table
    // Global Evaluation 3 (c)
    N_x | N_y | N_z | c
    1 | 0 | 0 | 3.91648e-05
    0 | 1 | 0 | 3.91648e-05
    0 | 0 | 1 | 3.91648e-05

Plots
  pg1: PlotGroup3D "Magnetic Flux Density Norm (mfnc)" | data = dset1
    mslc1: Multislice | expr = mfnc.normB
    arwv1: ArrowVolume | data = dset1; expr = {mfnc.Mx, mfnc.My, mfnc.Mz}

Exports
  tbl1: Table
    table = tbl1
    filename = C:\Users\naveensmk\Dropbox\Master Thesis\COMSOL\Data\Ellipsoid Saturated (Remanent M) copy\H_x.txt
  tbl2: Table
    table = tbl2
    filename = C:\Users\naveensmk\Dropbox\Master Thesis\COMSOL\Data\Ellipsoid Saturated (Remanent M) copy\H_y.txt
  tbl3: Table
    table = tbl3
    filename = C:\Users\naveensmk\Dropbox\Master Thesis\COMSOL\Data\Ellipsoid Saturated (Remanent M) copy\H_z.txt
  tbl4: Table
    table = tbl4
    filename = C:\Users\naveensmk\Dropbox\Master Thesis\COMSOL\Data\Ellipsoid Saturated (Remanent M) copy\M_app.txt
  tbl5: Table
    table = tbl5
    filename = C:\Users\naveensmk\Dropbox\Master Thesis\COMSOL\Data\Ellipsoid Saturated (Remanent M) copy\a.txt
  tbl6: Table
    table = tbl6
    filename = C:\Users\naveensmk\Dropbox\Master Thesis\COMSOL\Data\Ellipsoid Saturated (Remanent M) copy\b.txt
  tbl7: Table
    table = tbl7
    filename = C:\Users\naveensmk\Dropbox\Master Thesis\COMSOL\Data\Ellipsoid Saturated (Remanent M) copy\c.txt