// COMSOL Multiphysics 5.0.0.243 model "Helix1-10_2.mph"
// Helix1-10
// Outline of the model tree

Parameters
  n_helix = 4  // The number of the Helix from 1 till 10
  h_max = 32.97e-6 [m]
  k_helix = 3  // Number of turns
  d_nom = 3e-6[m]  // Nominal wire diameter
  D_nom = 10e-6[m]  // Nominal helix diameter
  h_nom = 10e-6[m]  // Nominal height (pitch)
  d_helix = d_nom  // Wire diameter
  h_min = d_helix
  h_tol = 0.005
  D_tol = 0
  h_helix = (h_min + (n_helix-1)*(h_max-h_min)/9)*(1 + h_tol)
  v_nom = (pi*d_nom^2/4)*k_helix*sqrt(h_nom^2+(pi*D_nom)^2)  // Nominal volume
  D_helix = (1/pi)*sqrt((round((4*v_nom/(k_helix*pi*d_nom^2))*10^8)*10^-8)^2-h_helix^2)+D_tol  // Helix diameter
  r_sphere = 5*h_helix*k_helix  // Sphere radius
  steps_x = 10
  steps_y = 10
  steps_z = 10
  mu0 = 1.25663706e-6[m*kg*s^-2*A^-2]  // Magnetic Constant
  M_app = 1[A/m]
  N_x = 1
  N_y = 0
  N_z = 0
  M_x = N_x*M_app
  M_y = N_y*M_app
  M_z = N_z*M_app
  s_coating = 300 [nm]

Variables
  var1 "Variables 1"
    M_x_av = aveop1(mfnc.Mx)
    M_y_av = aveop1(mfnc.My)
    M_z_av = aveop1(mfnc.Mz)

Geometry
  geom1 "Geometry 1" (3D, length unit m)
    sph1: Sphere | r = r_sphere
    if1: If | condition = n_helix==1
    hel1: Helix
      pos = {0, 0, -h_helix*k_helix/2}
      turns = k_helix
      rmaj = D_helix/2
      rmin = d_helix/2
      axialpitch = h_helix
      endcaps = paraaxis
    hel4: Helix
      pos = {-s_coating, 0, -h_helix*k_helix/2}
      turns = k_helix
      rmaj = D_helix/2
      rmin = d_helix/2
      axialpitch = h_helix
      endcaps = paraaxis
    blk1: Block | pos = {-2*D_helix, -D_helix, -h_helix*k_helix}; size = {2*D_helix, 2*D_helix, 2*h_helix*k_helix}
    dif2: Difference | input = hel1; input2 = blk1, hel4
    endif1: EndIf
    if2: If | condition = (n_helix>1)*(n_helix<10)
    hel2: Helix
      pos = {0, 0, -h_helix*k_helix/2}
      turns = k_helix
      rmaj = D_helix/2
      rmin = d_helix/2
      axialpitch = h_helix
      endcaps = perpspine
    hel3: Helix
      pos = {-s_coating, 0, -h_helix*k_helix/2}
      turns = k_helix
      rmaj = D_helix/2
      rmin = (d_helix)/2
      axialpitch = h_helix
      endcaps = perpspine
    dif1: Difference | input = hel2; input2 = hel3
    endif2: EndIf
    if3: If | condition = n_helix==10
    cyl1: Cylinder | pos = {0, 0, -h_helix*k_helix/2}; r = d_helix/2; h = h_helix
    cyl2: Cylinder | pos = {-s_coating, 0, -h_helix*k_helix/2}; r = d_helix/2; h = h_helix
    dif3: Difference | input = cyl1; input2 = cyl2
    endif3: EndIf
    fin: Finalize "Form Union"

Materials
  mat2: Common "Air" on no domains
    def "Basic"
      relpermeability = 1
      relpermittivity = 1
      dynamicviscosity = eta(T[1/K])[Pa*s]
      ratioofspecificheat = 1.4
      electricconductivity = 0[S/m]
      heatcapacity = Cp(T[1/K])[J/(kg*K)]
      density = rho(pA[1/Pa],T[1/K])[kg/m^3]
      thermalconductivity = k(T[1/K])[W/(m*K)]
      soundspeed = cs(T[1/K])[m/s]
      eta: Piecewise | arg = T; extrap = constant; pieces = {200.0, 1600.0, -8.38278E-7+8.35717342E-8*T^1-7.69429583E-11*T^2+4.6437266E-14*T^3-1.06585607E-17*T^4}
      Cp: Piecewise | arg = T; extrap = constant; pieces = {200.0, 1600.0, 1047.63657-0.372589265*T^1+9.45304214E-4*T^2-6.02409443E-7*T^3+1.2858961E-10*T^4}
      rho: Analytic | expr = pA*0.02897/8.314/T; args = {pA, T}; dermethod = manual; argders = {{pA, d(pA*0.02897/8.314/T,pA)}, {T, d(pA*0.02897/8.314/T,T)}}
      k: Piecewise | arg = T; extrap = constant; pieces = {200.0, 1600.0, -0.00227583562+1.15480022E-4*T^1-7.90252856E-8*T^2+4.11702505E-11*T^3-7.43864331E-15*T^4}
      cs: Analytic | expr = sqrt(1.4*287*T); args = T; dermethod = manual; argders = {T, d(sqrt(1.4*287*T),T)}
    RefractiveIndex
      n = 1
      ki = 0
  mat3: Common "Cobalt Steel Vacoflux 50_ScaledforNickel" (disabled) on no domains
    def "Basic"
      electricconductivity = 2.272727[MS/m]
      relpermittivity = 1[1]
      relpermeability = 5
    HBCurve
      normH = HBCurve1(normB[1/(T)])[A/m]
      normB = sqrt(B1^2+B2^2+B3^2)
      HBCurve1: Interpolation
        table = 
          {0, 0}
          {0.072655, 18.285}
          {0.087074, 18.333}
          {0.099587, 18.666}
          {0.10829, 19.571}
          {0.11127, 21.332}
          {0.10793, 24.142}
          {0.1029, 27.808}
          {0.10211, 32.046}
          {0.1115, 36.57}
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        extrap = linear
    BHCurve
      normB = BHCurve1(normH[1/(A/m)])[T]
      normH = sqrt(H1^2+H2^2+H3^2)
      BHCurve1: Interpolation
        table = 
          {0, 0}
          {18.285, 0.072655}
          {18.333, 0.087074}
          {18.666, 0.099587}
          {19.571, 0.10829}
          {21.332, 0.11127}
          {24.142, 0.10793}
          {27.808, 0.1029}
          {32.046, 0.10211}
          {36.57, 0.1115}
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        extrap = linear
  mat4: Common "Cobalt Steel Vacoflux 50_Test" (disabled) on no domains
    def "Basic"
      electricconductivity = 2.272727[MS/m]
      relpermittivity = 1[1]
      relpermeability = 5
    HBCurve
      normH = HBCurve1(normB[1/(T)])[A/m]
      normB = sqrt(B1^2+B2^2+B3^2)
    BHCurve
      normB = BHCurve1(normH[1/(A/m)])[T]
      normH = sqrt(H1^2+H2^2+H3^2)
      BHCurve1: Interpolation
        table = 
          {0, 0}
          {18.285, 0.19173}
          {18.333, 0.22978}
          {18.666, 0.2628}
          {19.571, 0.28576}
          {21.332, 0.29363}
          {24.142, 0.28482}
          {27.808, 0.27154}
          {32.046, 0.26946}
          {36.57, 0.29423}
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        extrap = linear
  mat5: Common "Cobalt Steel Vacoflux 50" on no domains
    def "Basic"
      electricconductivity = 2.272727[MS/m]
      relpermittivity = 1[1]
    HBCurve
      normH = HBCurve1(normB[1/(T)])[A/m]
      normB = sqrt(B1^2+B2^2+B3^2)
      HBCurve1: Interpolation
        table = 
          {0, 0}
          {0.273901809, 18.285}
          {0.328259582417, 18.3326171875}
          {0.375430663333, 18.6659375}
          {0.40822835925, 19.5706640625}
          {0.419465977667, 21.3325}
          {0.406882536674, 24.1419140625}
          {0.387919896729, 27.8084375}
          {0.384945628878, 32.0463671875}
          {0.420327304167, 36.57}
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        extrap = linear
    BHCurve
      normB = BHCurve1(normH[1/(A/m)])[T]
      normH = sqrt(H1^2+H2^2+H3^2)
      BHCurve1: Interpolation
        table = 
          {0, 0}
          {18.285, 0.273901809}
          {18.3326171875, 0.328259582417}
          {18.6659375, 0.375430663333}
          {19.5706640625, 0.40822835925}
          {21.3325, 0.419465977667}
          {24.1419140625, 0.406882536674}
          {27.8084375, 0.387919896729}
          {32.0463671875, 0.384945628878}
          {36.57, 0.420327304167}
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        extrap = linear

Physics
  mfnc: MagnetostaticsNoCurrents "Magnetic Fields, No Currents" on all domains
    dependent variable Vm
    BackgroundField.SolveFor = fullField
    BackgroundField.Hb = {5000[T]/mu0_const, 0, 0}
    mfc1: MagneticFluxConservation (default)
    mi1: MagneticInsulation (default)
    init1: init "Initial Values 1" (default)
    mfc2: MagneticFluxConservation on no domains | ConstitutiveRelationH = Magnetization; M = {M_x, M_y, M_z}
    zsp1: ZeroMagneticScalarPotential on no points

Mesh
  mesh1 "Mesh 1"
    size: MeshSizeDefault | hmax = 3.92E-5; hmin = 7.05E-6; hcurve = 0.6; hgrad = 1.5; hauto = 5; custom = off
    ftet1: FreeTet "Free Tetrahedral 1" on no domains
      size1: Size on no domains | hauto = 4; custom = on
    ftet2: FreeTet "Free Tetrahedral 2" on remaining entities
      prob1: MeshProblem "Problems 1"
        error1: MeshErrorSel "Error 1" on no boundaries
          error1_a: MeshErrorSel "Error" on no edges
        error2: MeshErrorSel "Error 2" on no boundaries
          error2_a: MeshErrorSel "Error" on no edges
        error3: MeshErrorSel "Error 3" on no boundaries
          error3_a: MeshErrorSel "Error" on no edges
        error4: MeshErrorSel "Error 4" on no domains
          error4_a: MeshErrorSel "Error" on no boundaries
        error5: MeshErrorSel "Error 5" on no domains
          error5_a: MeshErrorSel "Error" on no boundaries
        warning1: MeshWarning "Warning 1" on no edges
        warning2: MeshWarning "Warning 2" on no boundaries
        warning3: MeshWarning "Warning 3" on no boundaries
        warning4: MeshWarning "Warning 4" on domains 1

Studies
  std1 "Study 1"
    param2: Parametric "Parametric Sweep 2" | sweeptype = filled; pname = n_helix; plistarr = 1 2 3 4 5 6 7 8 9 10
    param: Parametric "Parametric Sweep" | pname = {N_x, N_y, N_z}; plistarr = {1 0 0, 0 1 0, 0 0 1}
    stat2: Stationary

Solver configurations
  sol1 "Solver 1" (study std1)
    v1: Variables "Dependent Variables 1"
    s1: Stationary "Stationary Solver 1"
      p1: Parametric
        sweeptype = sparse
        pname = {N_x, N_y, N_z}
        plistarr = {1 0 0, 0 1 0, 0 0 1}
        pcontinuationmode = no
      fc1: FullyCoupled | linsolver = i1
      i1: Iterative | linsolver = cg
        mg1: Multigrid | prefun = amg

Tables
  tbl1: Table
    // Volume Average 1 (mfnc.Hx)
    N_x | N_y | N_z | Magnetic field, x component (A/m)
    1 | 0 | 0 | -4.17632e+06
    0 | 1 | 0 | -16208.6
    0 | 0 | 1 | -66863.7
  tbl2: Table
    // Volume Average 2 (mfnc.Hy)
    N_x | N_y | N_z | Magnetic field, y component (A/m)
    1 | 0 | 0 | -16208.6
    0 | 1 | 0 | -4.32116e+06
    0 | 0 | 1 | -135761
  tbl3: Table
    // Volume Average 3 (mfnc.Hz)
    N_x | N_y | N_z | Magnetic field, z component (A/m)
    1 | 0 | 0 | -66863.7
    0 | 1 | 0 | -135761
    0 | 0 | 1 | -6.49413e+06

Exports
  tbl1: Table | table = tbl1
  tbl2: Table | table = tbl2
  tbl3: Table | table = tbl3; filename = D:\Data\Michel\Helix Simulations\H3_EF_Remament.txt