// COMSOL Multiphysics 4.4.0.150 model "Materials.mph"
// Outline of the model tree

Parameters
  n_helix = 3  // The number of the Helix from 1 till 10
  h_max = 32.97e-6 [m]
  k_helix = 3  // Number of turns
  d_nom = 3e-6[m]  // Nominal wire diameter
  D_nom = 10e-6[m]  // Nominal helix diameter
  h_nom = 10e-6[m]  // Nominal height (pitch)
  d_helix = d_nom  // Wire diameter
  h_min = d_helix
  tol = 0.01  // Tolerance for mesh making
  h_helix = (h_min + (n_helix-1)*(h_max-h_min)/9)*(1+tol)
  v_nom = (pi*d_nom^2/4)*k_helix*sqrt(h_nom^2+(pi*D_nom)^2)  // Nominal volume
  D_helix = (1/pi)*sqrt((round((4*v_nom/(k_helix*pi*d_nom^2))*10^8)*10^-8)^2-h_helix^2)  // Helix diameter
  r_sphere = 5*h_helix*k_helix  // Sphere radius
  steps_x = 20
  steps_y = 20
  steps_z = 20
  mu0 = 1.25663706e-6[m*kg*s^-2*A^-2]  // Magnetic Constant
  B_app = 10[T]
  B_x = B_app
  B_y = 0
  B_z = 0

Variables
  var1 "Variables 1"
    M_x_av = aveop1(mfnc.Mx)
    M_y_av = aveop1(mfnc.My)
    M_z_av = aveop1(mfnc.Mz)

Geometry
  geom1 "Geometry 1" (3D, length unit m)
    sph1: Sphere | r = r_sphere
    hel1: Helix
      pos = {0, 0, -h_helix*k_helix/2}
      turns = k_helix
      rmaj = D_helix/2
      rmin = d_helix/2
      axialpitch = h_helix
    fin: Finalize "Form Union"

Materials
  mat2 "Air" on domains 1
    def "Basic"
      relpermeability = 1
      relpermittivity = 1
      dynamicviscosity = eta(T[1/K])[Pa*s]
      ratioofspecificheat = 1.4
      electricconductivity = 0[S/m]
      heatcapacity = Cp(T[1/K])[J/(kg*K)]
      density = rho(pA[1/Pa],T[1/K])[kg/m^3]
      thermalconductivity = k(T[1/K])[W/(m*K)]
      soundspeed = cs(T[1/K])[m/s]
      eta: Piecewise | arg = T; extrap = constant; pieces = {200.0, 1600.0, -8.38278E-7+8.35717342E-8*T^1-7.69429583E-11*T^2+4.6437266E-14*T^3-1.06585607E-17*T^4}
      Cp: Piecewise | arg = T; extrap = constant; pieces = {200.0, 1600.0, 1047.63657-0.372589265*T^1+9.45304214E-4*T^2-6.02409443E-7*T^3+1.2858961E-10*T^4}
      rho: Analytic | expr = pA*0.02897/8.314/T; args = {pA, T}; dermethod = manual; argders = {{pA, d(pA*0.02897/8.314/T,pA)}, {T, d(pA*0.02897/8.314/T,T)}}
      k: Piecewise | arg = T; extrap = constant; pieces = {200.0, 1600.0, -0.00227583562+1.15480022E-4*T^1-7.90252856E-8*T^2+4.11702505E-11*T^3-7.43864331E-15*T^4}
      cs: Analytic | expr = sqrt(1.4*287*T); args = T; dermethod = manual; argders = {T, d(sqrt(1.4*287*T),T)}
    RefractiveIndex
      n = 1
      ki = 0
  mat3 "Cobalt Steel Vacoflux 50_ScaledforNickel" on domains 2
    def "Basic"
      electricconductivity = 2.272727[MS/m]
      relpermittivity = 1[1]
      relpermeability = 5
    HBCurve
      normH = HBCurve1(normB[1/(T)])[A/m]
      normB = sqrt(B1^2+B2^2+B3^2)
      HBCurve1: Interpolation
        table = 
          {0, 0}
          {0.072655, 18.285}
          {0.087074, 18.333}
          {0.099587, 18.666}
          {0.10829, 19.571}
          {0.11127, 21.332}
          {0.10793, 24.142}
          {0.1029, 27.808}
          {0.10211, 32.046}
          {0.1115, 36.57}
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        extrap = linear
    BHCurve
      normB = BHCurve1(normH[1/(A/m)])[T]
      normH = sqrt(H1^2+H2^2+H3^2)
      BHCurve1: Interpolation
        table = 
          {0, 0}
          {18.285, 0.072655}
          {18.333, 0.087074}
          {18.666, 0.099587}
          {19.571, 0.10829}
          {21.332, 0.11127}
          {24.142, 0.10793}
          {27.808, 0.1029}
          {32.046, 0.10211}
          {36.57, 0.1115}
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        extrap = linear
  mat4 "Cobalt Steel Vacoflux 50_Test" on domains 2
    def "Basic"
      electricconductivity = 2.272727[MS/m]
      relpermittivity = 1[1]
      relpermeability = 5
    HBCurve
      normH = HBCurve1(normB[1/(T)])[A/m]
      normB = sqrt(B1^2+B2^2+B3^2)
    BHCurve
      normB = BHCurve1(normH[1/(A/m)])[T]
      normH = sqrt(H1^2+H2^2+H3^2)
      BHCurve1: Interpolation
        table = 
          {0, 0}
          {18.285, 0.19173}
          {18.333, 0.22978}
          {18.666, 0.2628}
          {19.571, 0.28576}
          {21.332, 0.29363}
          {24.142, 0.28482}
          {27.808, 0.27154}
          {32.046, 0.26946}
          {36.57, 0.29423}
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        extrap = linear
  mat5 "Cobalt Steel Vacoflux 50" on no domains
    def "Basic"
      electricconductivity = 2.272727[MS/m]
      relpermittivity = 1[1]
    HBCurve
      normH = HBCurve1(normB[1/(T)])[A/m]
      normB = sqrt(B1^2+B2^2+B3^2)
      HBCurve1: Interpolation
        table = 
          {0, 0}
          {0.273901809, 18.285}
          {0.328259582417, 18.3326171875}
          {0.375430663333, 18.6659375}
          {0.40822835925, 19.5706640625}
          {0.419465977667, 21.3325}
          {0.406882536674, 24.1419140625}
          {0.387919896729, 27.8084375}
          {0.384945628878, 32.0463671875}
          {0.420327304167, 36.57}
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        extrap = linear
    BHCurve
      normB = BHCurve1(normH[1/(A/m)])[T]
      normH = sqrt(H1^2+H2^2+H3^2)
      BHCurve1: Interpolation
        table = 
          {0, 0}
          {18.285, 0.273901809}
          {18.3326171875, 0.328259582417}
          {18.6659375, 0.375430663333}
          {19.5706640625, 0.40822835925}
          {21.3325, 0.419465977667}
          {24.1419140625, 0.406882536674}
          {27.8084375, 0.387919896729}
          {32.0463671875, 0.384945628878}
          {36.57, 0.420327304167}
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        extrap = linear

Physics
  mfnc: MagnetostaticsNoCurrents "Magnetic Fields, No Currents" on all domains
    dependent variable Vm
    BackgroundField.SolveFor = fullField
    BackgroundField.Hb = {5000[T]/mu0_const, 0, 0}
    mfc1: MagneticFluxConservation (default)
    mi1: MagneticInsulation (default)
    init1: init "Initial Values 1" (default)
    mflx1: MagneticFluxDensity on boundaries 1-8 | nB_type = B0; B0 = {B_x, B_y, B_z}
    mfc2: MagneticFluxConservation on domains 2 | ConstitutiveRelationH = BHCurve
    zsp1: ZeroMagneticScalarPotential on points 9

Mesh
  mesh1 "Mesh 1"
    size: MeshSizeDefault | hauto = 4
    ftet1: FreeTet "Free Tetrahedral 1" on domains 2
    ftet2: FreeTet "Free Tetrahedral 2" on remaining entities
      size1: Size on entire geometry | hauto = 5

Studies
  std1 "Study 1"
    stat2: Stationary

Solver configurations
  sol1 "Solver 1" (study std1)
    v1: Variables "Dependent Variables 1"
    s1: Stationary "Stationary Solver 1"
      fc1: FullyCoupled | linsolver = i1
      i1: Iterative | linsolver = cg
        mg1: Multigrid | prefun = amg
    su1: StoreSolution
    v2: Variables "Dependent Variables 2" | initmethod = sol; notsolmethod = sol
    s2: Stationary "Stationary Solver 2"
      dDef: Direct
      fc1: FullyCoupled | linsolver = dDef; maxiter = 1000
  sol3 "Store Solution 3" (study std1)

Datasets
  dset1: Solution "Solution 1 (nonlinear)" | solution = sol1
  dset2: Solution "Solution 2 (linear)" | solution = sol3
  dset3: Solution "Solution 1 (nonlinear) 1" on domains 2 | solution = sol1

Plots
  pg3: PlotGroup3D "Magnetic Flux Density Norm (mfnc) 1" | data = dset1
    vol1: Volume | expr = mfnc.normB
      filt1: Filter | expr = dom==2
    arwv1: ArrowVolume | data = dset3; expr = {mfnc.Mx, mfnc.My, mfnc.Mz}; xnumber = 10; ynumber = 10; znumber = 20