// COMSOL Multiphysics 5.0.0.205 model "one_sided_magnet.mph"
// modeldescr_acdc/one_sided_magnet
// Outline of the model tree

Parameters
  k = pi/10[mm]  // Wave number in x direction
  M_pre = 5e5[A/m]  // Magnetization amplitude in magnet

Geometry
  geom1 "Geometry 1" (3D, length unit mm)
    cyl1: Cylinder | r = 10; h = 5
    sph1: Sphere | r = 20
    wp1: WorkPlane | quickz = -5; unite = on
      c1: Circle | r = 10
    fin: Finalize "Form Union"

Materials
  mat1: Common "Air" on domains 1
    def "Basic"
      relpermeability = 1
  mat2: Common "Linear mu-metal" on boundaries 5
    def "Basic"
      relpermeability = 4e4
  mat3: Common "Nonlinear mu-metal" on boundaries 5
    def "Basic"
      relpermeability = 1-1/(1/(1-mu_rmax)-(mu0_const*(H1^2+H2^2+H3^2)^(1/2)/B_sat)^(1/N))
      mu_rmax = 40000.0
      B_sat = 1.2[T]
      N = 1

Physics
  mfnc: MagnetostaticsNoCurrents "Magnetic Fields, No Currents" on all domains
    dependent variable Vm
    mfc1: MagneticFluxConservation (default)
    mi1: MagneticInsulation (default)
    init1: init "Initial Values 1" (default) | Vm = 1[A/m]*sqrt(x^2+y^2+z^2)
    mfc2: MagneticFluxConservation on domains 2
      ConstitutiveRelationH = Magnetization
      M = {M_pre*sin(k*x), 0, M_pre*cos(k*x)}
    ms1: MagneticShielding on boundaries 5 | ds = 0.5[mm]
    zsp1: ZeroMagneticScalarPotential on points 1

Mesh
  mesh1 "Mesh 1"
    size: MeshSizeDefault | hmax = 4; hmin = 0.72; hcurve = 0.6; hnarrow = 0.5; hgrad = 1.5; hauto = 5
    ftet1: FreeTet "Free Tetrahedral 1" on remaining entities

Studies
  std1 "Study 1"
    stat: Stationary

Solver configurations
  sol1 "Solution 1" (study std1)
    v1: Variables "Dependent Variables 1"
    s1: Stationary "Stationary Solver 1"
      fc1: FullyCoupled | linsolver = i1
      i1: Iterative | linsolver = cg
        mg1: Multigrid | prefun = amg

Datasets
  dset1: Solution on boundaries 5 | solution = sol1

Derived values
  int1: IntSurface "Surface Integration 1" on boundaries 5 | data = dset1; table = tbl1; expr = mfnc.unTmz+mfnc.dnTmz

Tables
  tbl1: Table
    // Surface Integration 1 (mfnc.unTmz+mfnc.dnTmz)
    mfnc.unTmz+mfnc.dnTmz (N)
    1.23049

Plots
  pg1: PlotGroup3D "3D Plot Group 1" | data = dset1
    slc1: Slice | expr = mfnc.normB; quickplane = zx; quickynumber = 1; genpoints = {{0, 0, 0}, {1, 0, 0}, {0, 1, 0}}
    arwv1: ArrowVolume | expr = {mfnc.Bx, mfnc.By, mfnc.Bz}; xnumber = 50; ynumber = 1; znumber = 50
    surf1: Surface | expr = mfnc.murxx